// SBML level 3 version 2
// Created with https://github.com/matthiaskoenig/sbmlutils.

model pravastatin_intestine(Vext, Vgu, Vlumen, Vfeces, pra_lumen, pra_ext, pra_feces)
  // Model for pravastatin elimination in the small intestine
  // Model for pravastatin transport from the small intestine into the liver
  // Model for enterohepatic uptake of pravastatin via OATP2B1 (SLCO2B1)
  // Terms of use
  // The content of this model has been carefully created in a manual research effort. This file has been created by Matthias König using sbmlutils . For questions contact koenigmx@hu-berlin.de.
  // Copyright © 2022 Matthias König.
  // This work is licensed under a Creative Commons Attribution 4.0 International License.
  // Redistribution and use of any part of this model, with or without modification, are permitted provided that the following conditions are met:
  // Redistributions of this SBML file must retain the above copyright notice, this list of conditions and the following disclaimer.
  // Redistributions in a different form must reproduce the above copyright notice, this list of conditions and the following disclaimer in the documentation and/or other materials provided with the distribution.
  // This model is distributed in the hope that it will be useful, but WITHOUT ANY WARRANTY; without even the implied warranty of MERCHANTABILITY or FITNESS FOR A PARTICULAR PURPOSE.
  // model units - substance: mmole, time: min, volume: litre, area: m2, length: metre, extent: mmole

  // Compartments:
  compartment Vext = 1 litre; Vext is "plasma";  // SBO:0000290 ncit:C13356 BTO:0000131
  compartment Vgu = 1.2825 litre; Vgu is "intestine";  // SBO:0000290 FMA:45615 BTO:0000545 ncit:C12736
  compartment Vlumen = 1.15425 litre; Vlumen is "intestinal lumen (inner part of intestine)";  // SBO:0000290 FMA:14586 UBERON:0018543
  compartment Vfeces = 1 litre;  // SBO:0000290 FMA:64183 ncit:C13234 BTO:0000440
  compartment Ventero = NaN; Ventero has litre; Ventero is "intestinal lining (enterocytes)";  // SBO:0000290
  compartment Vapical = NaN; Vapical has m2; Vapical is "apical membrane (intestinal membrane enterocytes)";  // SBO:0000290 FMA:84666 GO:0016324
  compartment Vbaso = NaN; Vbaso has m2; Vbaso is "basolateral membrane (intestinal membrane enterocytes)";  // SBO:0000290 FMA:84669 GO:0016323

  // Species:
  species pra_lumen in Vlumen = 0; pra_lumen is "pravastatin (intestinal volume)";  // SBO:0000247 pubchem.compound:54687 CHEBI:63618 ncit:C62070
  species pra_ext in Vext = 0; pra_ext is "pravastatin (plasma)";  // SBO:0000247 pubchem.compound:54687 CHEBI:63618 ncit:C62070
  substanceOnly species pra_feces in Vfeces = 0; pra_feces is "pravastatin (feces)";  // SBO:0000247 pubchem.compound:54687 CHEBI:63618 ncit:C62070

  // Parameters:
  // Fraction absorbed, i.e., only a fraction of the pravastatin in the intestinal lumen is absorbed. This parameter determines how much of the pravastatin is excreted in every round of the enterohepatic circulation.
  // Also, this parameter is dependent on OATP2B1 function, taking into consideration there may be SNPs hindering/enhancing the enzyme's function in the active process of the uptake of pravastatin. If OATP2B1 function is hindered, there would be more pravastatin excreted into faeces than absorbed and vice versa. (added: 16.03.2022)
  // F_pra_abs of dose is absorbed. (1-F_pra_abs) is excreted in feces.
  F_pra_abs = 0.95 dimensionless; F_pra_abs is "fraction absorbed pravastatin";  // SBO:0000002
  // OATP2B1 dependency; This parameter is altered via f_OATP1B1 to model the effect of genetic variants and activity changes.
  PRAABS_Vmax = 0.02529504 mmole_per_min_l; PRAABS_Vmax is "Vmax for pravastatin absorption via OATP2B1";  // SBO:0000186
  PRAABS_Km = 0.01 mM; PRAABS_Km is "Km for pravastatin absorption via OATP2B1";  // SBO:0000027
  absorption has mmole_per_min; absorption is "absorption pravastatin";
  // parameter controls genetic variants (2.0 reference function, < 2.0 reduced function, > 2.0 increased function)
  f_OATP2B1 = 2 dimensionless; f_OATP2B1 is "parameter for OATP2B1 activity";  // SBO:0000002

  // Assignment rules:
  absorption := PRAABS_Vmax*Vgu*pra_lumen/(pra_lumen + PRAABS_Km);

  // Reactions:
  // Import via OATP2B1 is irreversible at apical membrane of enterocytes.
  PRAABS: pra_lumen => pra_ext; F_pra_abs*absorption*f_OATP2B1; PRAABS is "absorption pravastatin (OATP2B1)";  // SBO:0000655
  PRAEXC: pra_lumen => pra_feces; (1 - F_pra_abs)*absorption; PRAEXC is "excretion pravastatin (feces)";  // SBO:0000655

  // Unit definitions:
  unit g_per_mole = gram / mole; g_per_mole is "g/mole";
  unit l_per_min = litre / (60 second); l_per_min is "l/min";
  unit l_per_min_mmole = litre / (60 second * 1e-3 mole); l_per_min_mmole is "l/min/mmole";
  unit m2 = metre^2; m2 is "meter^2";
  unit mM = 1e-3 mole / litre; mM is "mmole/liter";
  unit mg = 1e-3 gram;
  unit min = 60 second;
  unit mmole = 1e-3 mole;
  unit mmole_per_min = 1e-3 mole / (60 second); mmole_per_min is "mmole/min";
  unit mmole_per_min_l = 1e-3 mole / (60 second * litre); mmole_per_min_l is "mmole/min/liter";
  unit per_min = 1 / (60 second); per_min is "1/min";
  unit per_min_l = 1 / (60 second * litre); per_min_l is "1/min/liter";
end
