// SBML level 3 version 2
// Created with https://github.com/matthiaskoenig/sbmlutils.

model pravastatin_liver(Vext, Vli, Vbi, Vlumen, pra_ext, pra_lumen)
  // Model for pravastatin elimination in the liver
  // Model for hepatic uptake of pravastatin via OATP1B1 (SLCO1B1) and subsequent excretion in the bile via MRP2 in in SBML.
  // no metabolism of pravastatin
  // irreversible uptake and excretion of pravastatin in the bile
  // Terms of use
  // The content of this model has been carefully created in a manual research effort. This file has been created by Matthias König using sbmlutils . For questions contact koenigmx@hu-berlin.de.
  // Copyright © 2022 Matthias König.
  // This work is licensed under a Creative Commons Attribution 4.0 International License.
  // Redistribution and use of any part of this model, with or without modification, are permitted provided that the following conditions are met:
  // Redistributions of this SBML file must retain the above copyright notice, this list of conditions and the following disclaimer.
  // Redistributions in a different form must reproduce the above copyright notice, this list of conditions and the following disclaimer in the documentation and/or other materials provided with the distribution.
  // This model is distributed in the hope that it will be useful, but WITHOUT ANY WARRANTY; without even the implied warranty of MERCHANTABILITY or FITNESS FOR A PARTICULAR PURPOSE.
  // model units - substance: mmole, time: min, volume: litre, area: m2, length: metre, extent: mmole

  // Compartments:
  compartment Vext = 4 litre; Vext is "plasma";  // SBO:0000290 ncit:C13356 BTO:0000131
  compartment Vbaso = NaN; Vbaso has m2; Vbaso is "basolateral membrane";  // SBO:0000290 FMA:84669 GO:0016323
  compartment Vapical = NaN; Vapical has m2; Vapical is "apical membrane";  // SBO:0000290 FMA:84666 GO:0016324
  compartment Vli = 1.5 litre; Vli is "liver";  // SBO:0000290 FMA:7197 BTO:0000759 ncit:C12392
  compartment Vbi = 1 litre; Vbi is "bile";  // SBO:0000290 FMA:62971 ncit:C13192
  compartment Vlumen = 1.15425 litre; Vlumen is "intestinal lumen (inner part of intestine)";  // SBO:0000290 FMA:14586 UBERON:0018543

  // Species:
  species pra_ext in Vext = 0; pra_ext is "pravastatin (plasma)";  // SBO:0000247 pubchem.compound:54687 CHEBI:63618 ncit:C62070
  species pra in Vli = 0; pra is "pravastatin (liver)";  // SBO:0000247 pubchem.compound:54687 CHEBI:63618 ncit:C62070
  // Bile pravastatin in amount.
  substanceOnly species pra_bi in Vbi = 0; pra_bi is "pravastatin (bile)";  // SBO:0000247 pubchem.compound:54687 CHEBI:63618 ncit:C62070
  species pra_lumen in Vlumen = 0; pra_lumen is "pravastatin (intestinal volume)";  // SBO:0000247 pubchem.compound:54687 CHEBI:63618 ncit:C62070

  // Parameters:
  // parameter controls the health/state of liver function. [0,1] 0 no hepatic function, 1 for perfect hepatic function.
  f_hepatic_function = 1 dimensionless; f_hepatic_function is "parameter for liver function";  // SBO:0000002
  PRAIM_Vmax = 1 mmole_per_min_l; PRAIM_Vmax is "Vmax for pravastatin import via OATP1B1";  // SBO:0000186
  // parameter controls genetic variants (1.0 reference function, < 1.0 reduced function, > 1.0 increased function)
  f_OATP1B1 = 1 dimensionless; f_OATP1B1 is "parameter for OATP1B1 activity";  // SBO:0000002
  PRAIM_Km_pra = 0.01 mM; PRAIM_Km_pra is "Km for pravastatin import via OATP1B1";  // SBO:0000027
  PRAEX_Vmax = 1 mmole_per_min_l; PRAEX_Vmax is "Vmax for pravastatin export via MRP2";  // SBO:0000186
  // parameter controls genetic variants (2.0 reference function, < 2.0 reduced function, > 2.0 increased function)
  f_MRP2 = 2 dimensionless; f_MRP2 is "parameter for MRP2 activity";  // SBO:0000002
  PRAEX_Km_pra = 0.01 mM; PRAEX_Km_pra is "Km for pravastatin export via MRP2";  // SBO:0000027
  PRAEHC_Vmax = 100 per_min_l; PRAEHC_Vmax is "Vmax for pravastatin enterohepatic circulation";  // SBO:0000186

  // Reactions:
  // Import of pravastatin via OATP1B1 (SLCO1B1) from the plasma in the liver. Here the genetic variants of SLCO1B1 have their effects.
  // Irreversible import of pravastatin via Michaelis-Menten-Kinetics
  // might need to be changed to reversible transport as first data indicates (Pan1990).
  PRAIM: pra_ext => pra; f_hepatic_function*f_OATP1B1*PRAIM_Vmax*Vli*pra_ext/(pra_ext + PRAIM_Km_pra); PRAIM is "pravastatin import (OATP1B1)";  // SBO:0000655
  // Export of pravastatin via MRP2 from the liver in the bile. Here the genetic variants of MRP2 have their effects.
  // Irreversible export of pravastatin via Michaelis-Menten-Kinetics
  PRAEX: pra => pra_bi; f_hepatic_function*f_MRP2*PRAEX_Vmax*Vli*pra/(pra + PRAEX_Km_pra); PRAEX is "pravastatin bile export (MRP2)";  // SBO:0000655
  // Transport of pravastatin via bile to the intestinal lumen. This is the enterohepatic circulation of pravastatin.
  // Irreversible transport of pravastatin via Mass-Action-Kinetics
  PRAEHC: pra_bi => pra_lumen; f_hepatic_function*f_MRP2*PRAEHC_Vmax*Vli*pra_bi; PRAEHC is "pravastatin enterohepatic circulation";  // SBO:0000655

  // Unit definitions:
  unit g_per_mole = gram / mole; g_per_mole is "g/mole";
  unit l_per_min = litre / (60 second); l_per_min is "l/min";
  unit l_per_min_mmole = litre / (60 second * 1e-3 mole); l_per_min_mmole is "l/min/mmole";
  unit m2 = metre^2; m2 is "meter^2";
  unit mM = 1e-3 mole / litre; mM is "mmole/liter";
  unit mg = 1e-3 gram;
  unit min = 60 second;
  unit mmole = 1e-3 mole;
  unit mmole_per_min = 1e-3 mole / (60 second); mmole_per_min is "mmole/min";
  unit mmole_per_min_l = 1e-3 mole / (60 second * litre); mmole_per_min_l is "mmole/min/liter";
  unit per_min = 1 / (60 second); per_min is "1/min";
  unit per_min_l = 1 / (60 second * litre); per_min_l is "1/min/liter";
end
